! Geometria Teste Beam !
!!!!!!!!!!!!!!!!!!!!!!!!
FINISH
/CLEAR
/COM,  Structural

/PREP7

!!
!! keypoints originais
!!

L = 0.01

k,1,0,0,0
k,2,L,0,0

!
l,1,2  !1

!
!LFILLT,1,2,0.1

ET,1,4
!!! RECTANGULAR SECTION

b = 0.1
h = 0.1
area = b*h
Iyy = (h*b**3)/12
Izz = (b*h**3)/12

shear_coef_y = 0
shear_coef_z = 0

R, 1, area, Izz, Iyy,
!RMORE, , , shear_coef_z, shear_coef_y, , ,

MP,EX,1,200e9
MP,PRXY,1,0.3
MP,DENS,1,7850
!
!lesize,all,0.01
LESIZE, all, , , 1,
lmesh,all
!
!D, 1, All, 0
!D, 1200, All, 0
!D, 1325, All, 0
!
!F,361,FX,1
FINISH

/SOLU

ANTYPE,2
!*
!*
modes = 2

MODOPT,LANB,modes
EQSLV,SPAR
LUMPM,0
PSTRES,0
!*
MODOPT,LANB,modes,0,0, ,OFF
/STATUS,SOLU
!

SOLVE
FINISH

/POST1
!SET,LIST

*GET,NELEM,ELEM,0,COUNT
*GET,NNODE,NODE,0,COUNT
*GET,N_FREQ,ACTIVE,,SET,NSET
*GET,N_MAX,NODE,,num,max
!
!!!!!!!!!!!!!!!!!!
!!!!!!!!!!!!!!!!!!
*DIM,COORD,ARRAY,NNODE,4
*VGET,COORD(1,1),NODE, ,NLIST
*DIM,ELEMT,ARRAY,NELEM,3
*VGET,ELEMT(1,1),ELEM, ,ELIST
!
*DO,I,1,NNODE
num = COORD(I,1)
*GET,COORD(I,2),NODE,num,LOC,X
*GET,COORD(I,3),NODE,num,LOC,Y
*GET,COORD(I,4),NODE,num,LOC,Z
*ENDDO
!
*DO,I,1,NELEM
num = ELEMT(I,1)
*GET,ELEMT(I,2),ELEM,num,NODE,1
*GET,ELEMT(I,3),ELEM,num,NODE,2
*ENDDO
!
!
!
!*DIM,COORD,ARRAY,NNODE,4
!*VGET,COORD(1,1),NODE, ,NLIST
!*VGET,COORD(1,2),NODE,1,LOC,X,,,2
!*VGET,COORD(1,3),NODE,1,LOC,Y,,,2
!*VGET,COORD(1,4),NODE,1,LOC,Z,,,2
!
!*DIM,ELEMT,ARRAY,NELEM,3
!*VGET,ELEMT(1,1),ELEM, ,ELIST
!*VGET,ELEMT(1,2),ELEM,1,NODE,1,,,2
!*VGET,ELEMT(1,3),ELEM,1,NODE,2,,,2
!
!
!
*MWRITE,COORD(1,1),coord,dat,,,4,NNODE
(F7.0,' ',E22.15,' ',E22.15,' ',E22.15)
*MWRITE,ELEMT(1,1),connect,dat,,,3,NELEM
(F7.0,' ',F7.0,' ',F7.0)

/POST1

! commands to create dense matrix

! Stiffness global matrix
*DMAT,K_MatrixDense,D,IMPORT,FULL,file.full,STIFF
*EXPORT,K_MatrixDense,CSV,Kdense.csv,24,
!*PRINT,K_MatrixDense,Kdense.matrix

! Mass global matrix
*DMAT,M_MatrixDense,D,IMPORT,FULL,file.full,MASS
*EXPORT,M_MatrixDense,CSV,Mdense.csv,24,
!*PRINT,M_MatrixDense,Mdense.matrix

! Commands to create sparse matrix
!*SMAT,K_MatrixSparse,D,IMPORT,FULL,file.full,STIFF
!*EXPORT,K_MatrixSparse,MAT,Ksparse.mat,
!*PRINT,K_MatrixSparse,Ksparse.matrix

!*SMAT,M_MatrixSparse,D,IMPORT,FULL,file.full,MASS
!*EXPORT,M_MatrixSparse,MAT,Msparse.mat,
!*PRINT,M_MatrixSparse,Msparse.matrix

FINISH
